units metal
atom_style atomic
boundary p p p
read_data data.nacl
pair_style uma/kk precision mixed
pair_coeff * * /home/xyan11/workdir/uma-lmp/lammps/src/ML-UMA/uma-engine/artifacts/uma-s-1p2-omat Na Cl
newton off
neighbor 2.0 bin
neigh_modify delay 0 every 1 check yes
velocity all create 0.0 1
timestep 0.001
fix 1 all nve
thermo 0
run 0
run 20
