units metal
atom_style atomic
boundary p p p
read_data data.nacl
pair_style uma/kk precision mixed
pair_coeff * * /home/xyan11/workdir/uma-lmp/lammps/src/ML-UMA/uma-engine/artifacts/uma-s-1p2-omat Na Cl
newton off
neighbor 2.0 bin
neigh_modify delay 0 every 1 check yes
thermo_style custom step pe
thermo 1
dump 1 all custom 1 forces.dump id fx fy fz
dump_modify 1 sort id
run 0
undump 1
run 20
