units metal
atom_style atomic
boundary p p p
read_data data.nacl
pair_style uma/kk precision mixed
pair_coeff * * /home/xyan11/workdir/uma-lmp/lammps/src/ML-UMA/uma-engine/artifacts/uma-s-1p2-omat Na Cl
newton off
neighbor 2.0 bin
neigh_modify delay 0 every 1 check yes
thermo 0
# 21 run 0: 1 warmup counted in Pair too; report Pair/21
run 0
run 0
run 0
run 0
run 0
run 0
run 0
run 0
run 0
run 0
run 0
run 0
run 0
run 0
run 0
run 0
run 0
run 0
run 0
run 0
run 0
